# Range Equation
f_0 := 2.408*10^9*Hz
D := 2.7*10^-3*m
λ := c/f_0 = 0.124499 m
γ_air := 2
γ_Shannon := 5.5
d_0 := 2*D^2/λ = 0.00011711 m
P_rcvd(d) == P_tx*G_t*G_r*λ^2/((4*π)^2*d^2*L) == P_tx*G_t*G_r*λ^2/((4*π)^2*d_0^2*L)*(d_0/d)^2 == P_rcvd(d_0)*(d_0/d)^γ
# Doppler spread
runningMetersPerPacka1ge := 12000/(60*60*4) = 0.833333
endPoint_height := [0; 80]
onePackagePoint_height := [endPoint_height[0] + runningMetersPerPacka1ge; endPoint_height[1]]
dl_height := sqrt((endPoint_height[0] - onePackagePoint_height[0])^2 + (endPoint_height[1] - onePackagePoint_height[1])^2) = 0.833333
runningMetersPerPackage := 12000/(60*60*4)
packageTime := 0.25
c_lightspeed := 2.998*10^8
400/0.833 = 480.192
pEnd_length := [200; 0]
pOnePack_length := [pEnd_length[0] + runningMetersPerPackage; pEnd_length[1] - 0.4]
dl_length := sqrt((pEnd_length[0] - pOnePack_length[0])^2 + (pEnd_length[1] - pOnePack_length[1])^2) = 0.924362
# (13.30920kph)
# (11.99880kph)
42*0.333 = 13.986
# (493023.6kph)
v_lenght := dl_length/packageTime = 3.69745
# Samples Per Round
# (1)
v_height := dl_height/packageTime = 3.33333
f_doppler_length := v_lenght/c_lightspeed*f_0 = 29.698 Hz
f_doppler_height := v_height/c_lightspeed*f_0 = 26.7734 Hz
dv_extreme := dv_extreme/c_lightspeed*f_0 == 1100000 Hz solve, dv_extreme → 136951.827243
Runde := 906.1739
packages := Runde/runningMetersPerPackage = 1087.41
2*π/packages = 0.00577813
packages/4 = 271.852
outOfRange := 61
inRange := 271.852 - outOfRange = 210.852
210.852 + 61 + 61 = 332.852
1088/2 = 544
271.852*3 = 815.556
816 + 61 + 61 = 938
