# Antenna power requirements
# In this section, several transmission methods are analysed
# BLUETOOTH TelosB
# The chosen antenna is the nRF8001 integrated circuit BLE chip. Information about the chip can be found in the datasheet:
# The power required for on (TX) and hibernate is:
I_ANT_on_nRF := 9.7 mA
I_ANT_sleep_nRF := 0.5 μA
Vcc_ANT_nRF := 3 V
# When transmitting, we need to transmit once per 10 seconds
f_TX_nRF := 1/(10*s) = 0.1 Hz
# Because transmitted data is relatively simple (only seconds, classification and ID), 1 kb should be plenty of data to send.
throughput_nRF := 0.27*10^6/s = 270000 1/s
Data_len_nRF := 1*10^3
lat_nRF := 6 ms
t_TX_nRF := Data_len_nRF/throughput_nRF + lat_nRF*2 = 15.7037 ms
# The running/sleeping duty cycle is calculated from the TX frequency and length.
# We ignore advertising
on_DC_ANT_nRF := f_TX_nRF*t_TX_nRF = 0.157037 %
sleep_DC_ANT_nRF := 1 - on_DC_ANT_nRF = 99.843 %
# Average power consumtion from TX and hibernating time.
I_avg_ANT_nRF := I_ANT_on_nRF*on_DC_ANT_nRF + I_ANT_sleep_nRF*sleep_DC_ANT_nRF = 15.7318 μA
P_avg_ANT_nRF := Vcc_ANT_nRF*I_avg_ANT_nRF = 0.0471954 mW
Power_Transmitting_Ideal := I_ANT_on_nRF*Vcc_ANT_nRF = 0.0291 W
Efficiency := 60 %
AbsorpedPower := 89 %
P_Transmitted_dBm := 10*log((Power_Transmitting_Ideal*AbsorpedPower)*Efficiency/(1 mW)) = 11.9143
Miles := 0.015
Kilometers := Miles*1.667 = 0.025005
# Estimated total energy consumption
# and battery
# The total energy consumption of the entire device is estimated, in order to be able to calculate the energy harvesting and solar cell that is needed.
# The total average power is calculated by taking the average of all the modules used for investigation and then multiplying a small extra factor, for losses etc.
P_avg_all := (P_avg_MCU + P_avg_MS + P_avg_SG + P_avg_ANT_nRF)*1.1
# Multiplying thos by the wanted average lifetime of the device, we get the total required power in watthours
P_tot := P_avg_all*7*day
# To figure out the size of a needed battery, we need to look at the power density of a given battery, for example a panasonic Lithium-ion battery:
# https://na.industrial.panasonic.com/sites/default/pidsa/files/ncr18650b.pdf
# Where we have used a slightly lower power density to compensate for power management circuits etc.
Pd_bat := 550*W*hr/l
# The physical required area of the battery is then:
V_bat := P_tot/Pd_bat
# Assuming we have a battery of 5 mm thickness, the length*witdh would need to be
A_bat := V_bat/(5 mm)
# Energy harvesting
# The MPG-D655 Thin FIlm Thermogenerator is chosen: http://micropelt.com/downloads/datasheet_mpg_d655.pdf
N_leg := 288
R_therm := 210 Ω
U_given := 80*mV/K
α := N_leg*α == U_given solve, α → = μV/K  # error: This value must be a scalar.
dT := 10 K
U_therm := N_leg*dT*α
I_therm := U_therm/R_therm
P_term := U_therm*I_therm
# We know from the given output power graph on the datasheet that we only get approximately 0.65 mW for 10K of temperature gradient. From this, we calculate a loss factor L
L := 0.65 mW/P_term
# We now have a formula for mW per Kelvin with thermal losses, which fits with the data that is given
U_therm_L(t) := N_leg*t*α
I_therm_L(t) := U_therm_L(t)/R_therm
P_term_L(t) := U_therm_L(t)*I_therm_L(t)*L
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P_term_L(5 K) =  # error: This variable is undefined.
# Because the MPG-D655 chip is very small, we can have several of them in a single wearable device.
TG_L := 3.3 mm
TG_W := 2.425 mm
TG_T := 1.09 mm
A_TG := TG_L*TG_W = 0.080025 cm^2
# So, assuming we need to generate the same enough to power the circuit exclusively by energy harvesting (assuming 5K gradient), we calculate how many chips we would need in the ideal:
N_TG := round(P_avg_all/P_term_L(5 K))
# And realistic scenario, with a energy harvesting active only 75% of the time
P_TG_real := P_term_L(5 K)*0.75
N_TG_real := round(P_avg_all/(P_term_L(5 K)*0.75) + 0.5)
# Which will cover an area of
A_TG_full := N_TG_real*A_TG
# Final Battery and Energy harvesting solution
# We have decided that we can allocate a total of 6 cm^2. A 50/50 split of this, allocating 3 for would mean that we would allocate 3 for battery and 3 for energy harvesting.
# The total power harvested is then assuming a temperature gradient of 5K:
A_bat := 3 cm^2
P_avg_TG := P_TG_real*round(3 cm^2/A_TG + 0.5)
# and we get a battery with
P_bat := Pd_bat*A_bat*5*mm = 825 mW*hr
# Which could last by itself for
P_bat/P_avg_all =  # error
# And with the energy harvesting, the battery can last for approximately
battery_life := P_bat/(P_avg_all - P_avg_TG)
P_ratio(r) := (Pd_bat*6*cm^2*5*mm)*r/(P_avg_all - (P_TG_real*round(6 cm^2/A_TG + 0.5))*(1 - r))
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