# Range Equation
f_0 := 2.408*10^9*Hz
D := 2.7*10^-3*m
λ := c/f_0 = 0.124499 m
γ_air := 2
γ_Shannon := 5.5
d_0 := 2*D^2/λ = 0.00011711 m
G_t := 1
G_r := 1
P_tx := 0.001
L_1 := 1
# (1)
P_rcvd(d) == P_tx*G_t*G_r*λ^2/((4*π)^2*d^2*L) == P_tx*G_t*G_r*λ^2/((4*π)^2*d_0^2*L)*(d_0/d)^2 == P_rcvd(d_0)*(d_0/d)^γ
P_rcvd0 := P_tx*G_t*G_r*λ^2/((4*π)^2*d_0^2*L_1) = 7.15685
P_R(d) := 10*log((P_rcvd0*(d_0/(d*m))^2)/0.001)
P_R(157.1) = -84.0044
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# Doppler spread
runningMetersPerPacka1ge := 12000/(60*60*4) = 0.833333
runningMetersPerPackage := 12000/(60*60*4) = 0.833333
packageTime := 0.25
c_lightspeed := 2.998*10^8
400/0.833 = 480.192
pEnd_length := [200; 0]
pOnePack_length := [pEnd_length[0] + runningMetersPerPackage; pEnd_length[1] - 0.4]
endPoint_height := [0; 80]
onePackagePoint_height := [endPoint_height[0] + runningMetersPerPacka1ge; endPoint_height[1]]
dl_length := sqrt((pEnd_length[0] - pOnePack_length[0])^2 + (pEnd_length[1] - pOnePack_length[1])^2) = 0.924362
dl_height := sqrt((endPoint_height[0] - onePackagePoint_height[0])^2 + (endPoint_height[1] - onePackagePoint_height[1])^2) = 0.833333
v_lenght := dl_length/packageTime = 3.69745
v_height := dl_height/packageTime = 3.33333
# (13.30920kph)
# (11.99880kph)
42*0.333 = 13.986
f_doppler_length := v_lenght/c_lightspeed*f_0 = 29.698 Hz
f_doppler_height := v_height/c_lightspeed*f_0 = 26.7734 Hz
dv_extreme := dv_extreme/c_lightspeed*f_0 == 1100000 Hz solve, dv_extreme → 136951.827243
# (493023.6kph)
# Samples Per Round Theory
Runde := 906.1739
packages := Runde/runningMetersPerPackage = 1087.41
2*π/packages = 0.00577813
packages/4 = 271.852
outOfRange := 61
inRange := 271.852 - outOfRange = 210.852
# Samples Per Round Small Track Test Setup
PackagesPerSec := 50
runningMetersPerPackage_Tog := 0.2604/50
Round_small := 0.435
Rounds_small := 168
totalLength := Rounds_small*Round_small = 73.08
TotalPackages := totalLength*Rounds_small = 12277.4
packages_small := Round_small/runningMetersPerPackage_Tog = 83.5253
Length_in_range := 2*(0.131 + 0.05)
Packages_in_range := Length_in_range/runningMetersPerPackage_Tog = 69.5084
outOfRange_Package_small := packages_small - Packages_in_range = 14.0169
TotalRelayedPackages_small := outOfRange_Package_small*Rounds_small = 2354.84
TotalDirectPackages_small := TotalPackages - TotalRelayedPackages_small = 9922.6
# Samples Per Round Large Track Test Setup
Runde_large := 0.56
Rounds_large := totalLength/Runde_large = 130.5
packages_large := Runde_large/runningMetersPerPackage_Tog = 107.527
outOfRange_Package_Out_Large := packages_large - Packages_in_range = 38.0184
TotalRelayedPackages_large := outOfRange_Package_Out_Large*Rounds_large = 4961.41
TotalDirectPackages_Large := TotalPackages - TotalRelayedPackages_large = 7316.03
# Relationship of the tracks
TrackRelayPersentage := TotalRelayedPackages_large/TotalRelayedPackages_small*100 = 210.69
RelaysDiff := TotalRelayedPackages_large - TotalRelayedPackages_small = 2606.57
