# Runner Scenario
v_runner := 12 km/hr
l_track := 906.1739 m
t_runner_round := l_track/v_runner = 4.53087 min
p_track_frequence := 4 Hz
p_track_time := p_track_frequence^-1 = 250 ms
p_track_perRound := l_track/v_runner*p_track_frequence = 1087.41
l_marathon := 42.195 km
rounds_track := l_marathon/l_track = 46.5639
# Train Setup
t_train_round := 15.5*sec
l_circle := 43.5 cm
l_circle2 := 56 cm
h_circle := 22 cm
l_train := (l_circle - h_circle)*2 + h_circle*π = 1.12115 m
l_train2 := (l_circle2 - h_circle)*2 + h_circle*π = 1.37115 m
v_train := l_train/t_train_round = 4.33994 m/min
factor := 4
p_train_perRound := p_track_perRound/factor = 271.852
(p_train_perRound/t_train_round)^-1 = 57.0163 ms
rounds_train := rounds_track*factor = 186.256
rounds_train*t_train_round = 48.116 min
